<?xml version="1.0"?>
<Node 	name="Root" gravity="0 -1 0" time="0" animate="0"  dt="0.001" >
<VisualStyle displayFlags="hideVisualModels showBehaviorModels showMappings showForceFields" />
<Node 	name="complianceSolverScene" >
    <ComplianceSolver verbose="0" implicitVelocity="1" implicitPosition="1"/>
    <MechanicalObject template="Vec3d" position="0 0 0   1 0 0 " name="particleDOFs" />
    <FixedConstraint template="Vec3d" indices="0" />
    <UniformMass />
    <Node name="extensionsNode" >
        <MechanicalObject template="Vec1d"  name="extensionsDOF" />
        <EdgeSetTopologyContainer edges="0 1  " />
        <ExtensionMapping />
        <UniformCompliance template="Vec1d" compliance="0." dampingRatio="0.1"  isCompliance="1"/>
    </Node>
</Node>
</Node>
