import Sofa

import sys
import os
current_path = os.path.dirname(os.path.abspath(__file__))
sys.path.append(current_path + '/..') # wtf ?

import Plugin

import math

from Compliant import Rigid, Vec, Quaternion, Tools, Control

class Shared:
    pass

global shared
shared = Shared()

dir = Tools.path( __file__ )

def createScene(node):

    # controller
    node.createObject('PythonScriptController',
                      filename = __file__,
                      classname = 'Controller' )

    # time step
    node.dt = 0.005

    # scene node
    scene = Tools.scene( node )

    # display flags
    style = node.getObject('style')
    style.findData('displayFlags').showMappings = True

    # collision detection
    proximity = node.getObject('proximity')
    proximity.alarmDistance = 0.5
    proximity.contactDistance = 0.1

    # contat manager
    manager = node.getObject('manager')
    manager.response = 'CompliantContact'
    manager.responseParams = 'compliance=0'

    # integrator
    ode = node.getObject('ode')
    ode.stabilization = True

    # main solver
    num = node.createObject('BenchmarkSolver', name = 'num')

    # pgs benchmark
    shared.pgs = node.createObject('Benchmark', name = 'bench-pgs')

    # pgs solver
    pgs = node.createObject('SequentialSolver',
                            name = 'pgs',
                            iterations = 100,
                            precision = 1e-8,
                            bench = '@./bench-pgs')

    # we need compliantdev for qpsolver
    node.createObject('RequiredPlugin',
                      pluginName = 'CompliantDev')

    # qp benchmark
    shared.qp = node.createObject('Benchmark', name = 'bench-qp')

    # qp solver
    qp = node.createObject('QPSolver',
                            name = 'qp',
                            iterations = 100,
                            precision = 1e-8,
                            bench = '@./bench-qp')

    # plane
    plane = Rigid.Body('plane')
    plane.visual = dir + '/mesh/ground.obj'
    plane.collision = plane.visual
    plane.mass_from_mesh( plane.visual, 10 )
    plane.node = plane.insert( scene )

    plane.node.createObject('FixedConstraint',
                             indices = '0')

    # box
    box = Rigid.Body('box')
    box.visual = dir + '/mesh/cube.obj'
    box.collision = box.visual
    box.dofs.translation = [0, 3, 0]
    box.mass_from_mesh( box.visual, 50 )
    box.node = box.insert( scene )


from itertools import izip

# scene controller
class Controller(Sofa.PythonScriptController):

    def onLoaded(self,node):
        self.node = node
        return 0

    def reset(self):
        return 0

    def onBeginAnimationStep(self, dt):
        return 0

    def onEndAnimationStep(self, dt):
        # print benchmark report
        print 't =', self.node.getTime()
        print

        for bench in [shared.pgs, shared.qp]:

            # display the values from the bench object
            total = []

            for (p, d, c) in izip(bench.primal,
                                  bench.dual,
                                  bench.complementarity):
                total.append(p[0] + d[0] + c[0])

            print bench.name
            print 'factor:', bench.factor / 1000, 'ms'
            print 'convergence:', total
            print 'duration (ms):', [ x[0] / 1000 for x in bench.duration]
            print
        return 0


    def bwdInitGraph(self,node):
        return 0
