import Sofa

import os.path
import math
import xml.etree.ElementTree as etree

import Quaternion
import Tools
from Tools import listToStr as concat
import units

def parseIdName(obj,objXml):
    """ set id and name of obj
    """
    obj.id = objXml.attrib["id"]
    obj.name = obj.id
    if not objXml.find("name") is None:
        obj.name = objXml.find("name").text

def parseData(xmlData):
    """ return the list of data in xmlData
    """
    if xmlData.attrib["type"]=="float":
        return Tools.strToListFloat(xmlData.text)
    elif xmlData.attrib["type"]=="int":
        return Tools.strToListInt(xmlData.text)
    elif xmlData.attrib["type"]=="string":
        return xmlData.text.split()

class Model:

    class Mesh:

        class Group:
            def __init__(self):
                self.index=list()
                self.data=dict()

        def __init__(self, meshXml):
            self.format = meshXml.find("source").attrib["format"]
            self.source = meshXml.find("source").text

            self.group=dict()
            self.data=dict()
            for g in meshXml.iter("group"):
                self.group[g.attrib["id"]] = Model.Mesh.Group()
                self.group[g.attrib["id"]].index = Tools.strToListInt(g.find("index").text)
                for d in g.iter("data"):
                    self.group[g.attrib["id"]].data[d.attrib["name"]]=parseData(d)

    class Rigid:
        def __init__(self, objXml):
            parseIdName(self,objXml)
            self.position=Tools.strToListFloat(objXml.find("position").text)
            self.mesh = None
            self.density=None
            self.mass=None
            if not objXml.find("density") is None:
                self.density=float(objXml.find("density").text)
            if not objXml.find("mass") is None:
                self.mass = float(objXml.find("mass").text)

    class Offset:
        def __init__(self, offsetXml):
            self.name = "offset"
            self.value = Tools.strToListFloat(offsetXml.text)
            self.type = offsetXml.attrib["type"]

        def isAbsolute(self):
            return self.type == "absolute"

    class Dof:
        def __init__(self, dofXml):
            self.index = Model.dofIndex[dofXml.attrib["index"]]
            self.min = None
            self.max = None
            if "min" in dofXml.attrib:
                self.min = float(dofXml.attrib["min"])
            if "max" in dofXml.attrib:
                self.max = float(dofXml.attrib["max"])

    class JointGeneric:
        #def __init__(self, name="Unknown",object1,offset1,object2,offset2):
        def __init__(self, jointXml):
            parseIdName(self,jointXml)
            self.objects = [None,None]
            # offsets
            self.offsets = [None,None]
            objects = jointXml.findall("object")
            for i in range(0,2):
                if not objects[i].find("offset") is None:
                    self.offsets[i] = Model.Offset(objects[i].find("offset"))
                    self.offsets[i].name = "offset_{0}".format(self.name)

            # dofs
            self.dofs = []
            for dof in jointXml.iter("dof"):
                self.dofs.append(Model.Dof(dof))

    class Deformable:

        class Skinning:
            """ Skinning definition, vertices index influenced by rigid with weight
            """
            def __init__(self):
                self.rigid=None
                self.index=list()
                self.weight=list()

        def __init__(self,objXml):
            parseIdName(self,objXml)
            self.position = Tools.strToListFloat(objXml.find("position").text)
            self.mesh = None
            self.indices=dict()
            self.weights=dict()
            self.skinnings=list()

    class Surface:
        def __init__(self):
            self.object=None
            self.mesh=None
            self.index=None

    class ContactSliding:
        def __init__(self,contactXml):
            parseIdName(self,contactXml)
            self.surfaces = [None,None]
            self.distance=None
            if contactXml.find("distance"):
                self.distance=float(contactXml.findText("distance"))

    dofIndex={"x":0,"y":1,"z":2,"rx":3,"ry":4,"rz":5}

    def __init__(self, filename, name=None):
        self.name=name
        self.modelDir = os.path.dirname(filename)
        self.units=dict()
        self.meshes=dict()
        self.rigids=dict()
        #self.rigidsbyType=dict()
        self.genericJoints=dict()
        self.deformables=dict()
        self.slidingContacts=dict()
        #self.deformablesByType=dict()

        with open(filename,'r') as f:
            # TODO automatic DTD validation could go here, not available in python builtin ElementTree module
            modelXml = etree.parse(f).getroot()
            if self.name is None and "name" in modelXml.attrib:
                self.name = modelXml.attrib["name"]
            else:
                self.name = os.path.basename(filename)

            # units
            self.parseUnits(modelXml)

            # meshes
            for m in modelXml.iter("mesh"):
                if not m.find("source") is None:
                    if m.attrib["id"] in self.meshes:
                        print "WARNING: sml.Model: mesh id {0} already defined".format(m.attrib["id"])
                    mesh = Model.Mesh(m)
                    sourceFullPath = os.path.join(self.modelDir,mesh.source)
                    if os.path.exists(sourceFullPath):
                        mesh.source=sourceFullPath
                    else:
                        print "WARNING: sml.Model: mesh not found:", mesh.source
                    self.meshes[m.attrib["id"]] = mesh

            # rigids
            for r in modelXml.iter("rigid"):
                if r.attrib["id"] in self.rigids: #TODO check deformables too
                    print "ERROR: sml.Model: rigid defined twice, id:", r.attrib["id"]
                    continue
                rigid=Model.Rigid(r)
                self.parseMesh(rigid, r)
                self.rigids[rigid.id]=rigid

            # joints
            self.parseJointGenerics(modelXml)

            #deformable
            for d in modelXml.iter("deformable"): #TODO check rigids too
                if d.attrib["id"] in self.deformables:
                    print "ERROR: sml.Model: deformable defined twice, id:", d.attrib["id"]
                    continue
                deformable=Model.Deformable(d)
                self.parseMesh(deformable, d)
                mesh=deformable.mesh # shortcut

                for s in d.iter("skinning"):
                    if not s.attrib["rigid"] in self.rigids:
                        print "ERROR: sml.Model: skinning for deformable {0}: rigid {1} is not defined".format(name, s.attrib["rigid"])
                        continue
                    skinning = Model.Deformable.Skinning()
                    skinning.rigid = self.rigids[s.attrib["rigid"]]
                    if not (s.attrib["group"] in mesh.group and s.attrib["weight"] in mesh.group[s.attrib["group"]].data):
                        print "ERROR: sml.Model: skinning for deformable {0}: group {1} - weight {2} is not defined".format(name, s.attrib["group"], s.attrib["weight"])
                        continue
                    skinning.index = mesh.group[s.attrib["group"]].index
                    skinning.weight = mesh.group[s.attrib["group"]].data[s.attrib["weight"]]
                    deformable.skinnings.append(skinning)

                self.deformables[deformable.id]=deformable

            # contacts
            for c in modelXml.iter("contactSliding"):
                if c.attrib["id"] in self.slidingContacts:
                    print "ERROR: sml.Model: contactSliding defined twice, id:", c.attrib["id"]
                    continue
                contact = Model.ContactSliding(c)
                surfaces=c.findall("surface")
                for i,s in enumerate(surfaces):
                    contact.surfaces[i] = Model.Surface()
                    if s.attrib["object"] in self.rigids:
                        contact.surfaces[i].object = self.rigids[s.attrib["object"]]
                    elif s.attrib["object"] in self.deformables:
                        contact.surfaces[i].object = self.deformables[s.attrib["object"]]
                    else:
                        print "ERROR: sml.Model: in contact {0}, unknown object {1} referenced".format(contact.name, s.attrib["object"])
                    contact.surfaces[i].mesh = contact.surfaces[i].object.mesh # for now a single mesh is supported
                    contact.surfaces[i].index = contact.surfaces[i].mesh.group[s.attrib["group"]].index
                self.slidingContacts[contact.id]=contact


    def parseUnits(self, modelXml):
        xmlUnits = modelXml.find("units")
        if not xmlUnits is None:
            for u in xmlUnits.attrib:
                self.units[u]=xmlUnits.attrib[u]

    def parseMesh(self, obj, objXml):
        if not objXml.find("mesh") is None:
            meshId = objXml.find("mesh").attrib["id"]
            if meshId in self.meshes:
                obj.mesh = self.meshes[meshId]
            else:
                print "ERROR: sml.Model: object {0} references undefined mesh {1}".format(obj.name, meshId)

    def parseJointGenerics(self,modelXml):
        for j in modelXml.iter("jointGeneric"):
            if j.attrib["id"] in self.genericJoints:
                print "ERROR: sml.Model: jointGeneric defined twice, id:", j.attrib["id"]
                continue

            joint=Model.JointGeneric(j)
            objects=j.findall("object")
            for i,o in enumerate(objects):
                if o.attrib["id"] in self.rigids:
                    joint.objects[i] = self.rigids[o.attrib["id"]]
                #elif o.attrib["id"] in self.deformables: # TODO check id uniqueness in rigids and deformables first !
                else:
                    print "ERROR: sml.Model: in joint {0}, unknown object {1} referenced".format(joint.name, o.attrib["id"])
            self.genericJoints[joint.id]=joint

def insertVisual(parentNode,obj,color):
    node = parentNode.createChild("node_"+obj.name)
    translation=obj.position[:3]
    rotation = Quaternion.to_euler(obj.position[3:])  * 180.0 / math.pi
    Tools.meshLoader(node, obj.mesh.source, name="loader_"+obj.name, translation=concat(translation),rotation=concat(rotation))
    node.createObject("OglModel",src="@loader_"+obj.name, color=color)

def setupUnits(myUnits):
    message = "units:"
    for quantity,unit in myUnits.iteritems():
        exec("units.local_{0} = units.{0}_{1}".format(quantity,unit))
        message+=" "+quantity+":"+unit
    print message

class BaseScene:
    """ Base class for Scene class, creates a node for this Scene
    """
    class Param:
        pass

    def __init__(self,parentNode,model):
        self.model=model
        self.param=BaseScene.Param()
        self.nodes = dict() # to store special nodes
        self.node=parentNode.createChild(self.model.name)

class SceneDisplay(BaseScene):
    """ Creates a scene to display rigids and deformables meshes
    """
    def __init__(self,parentNode,model):
        BaseScene.__init__(self,parentNode,model)
        self.param.rigidColor="1. 0. 0."
        self.param.deformableColor="0. 1. 0."

    def createScene(self):
        model=self.model # shortcut
        for rigid in model.rigids.values():
            print "Display rigid:",rigid.name
            insertVisual(self.node, rigid, self.param.rigidColor)

        for deformable in model.deformables.values():
            print "Display deformable:",deformable.name
            insertVisual(self.node, deformable, self.param.deformableColor)
