<?xml version="1.0"?>
<Node name="root" dt="0.02">
    <RequiredPlugin name="Sofa.Component.Visual"/> <!-- Needed to use components [VisualStyle, CylinderVisualModel] -->
    <DefaultAnimationLoop/>
    <VisualStyle displayFlags="showVisual" />
    <CylinderVisualModel  position="0 0 0   10 0 0 "  edges="0 1" color="yellow" />

</Node>
