<?xml version="1.0"?>
<Node name="Root"  dt="0.1" >
    <RequiredPlugin name="SofaOpenglVisual"/>
    <Node name="Spoon1">
        <EulerImplicitSolver name="cg_odesolver" printLog="false"  rayleighStiffness="0.1" rayleighMass="0.1" />
        <CGLinearSolver iterations="25" name="linear solver" tolerance="1.0e-9" threshold="1.0e-9" />
        <MechanicalObject template="Rigid" dx="0" dy="0" dz="0" name="default118" position="0 1.41421 0 0 0 0.382683 0.92388" rest_position="0 1.41421 0 0 0 0.382683 0.92388" />
        <LinearMovementConstraint template="Rigid" keyTimes="0 2 10 40 50" movements="0 0 0   0 0 0
										      0 0 0   0 0 0
										      0 0 -1  0 0 0
										      0 0 -1  0 0 6.3
										      0 0 -1   0 0 6.3" />
        <Node name="coli">
            <MeshObjLoader name="loader" filename="mesh/liver.obj" />
            <MeshTopology src="@loader" />
            <MechanicalObject src="@loader" template="Vec3d" name="dofs" />
            <TriangleCollisionModel moving="1" simulated="1" contactStiffness="100000000"/>
            <RigidMapping template="Rigid3d,Vec3d" />
        </Node>
        <Node name="Visu">
            <MeshObjLoader name="meshLoader_1" filename="mesh/liver.obj" handleSeams="1" />
            <OglModel name="Visual" src="@meshLoader_1" color="red" />
            <RigidMapping template="Rigid3d,ExtVec3f" name="default161" input="@.." output="@Visual" />
        </Node>
    </Node>
    <Node name="Spoon2">
        <EulerImplicitSolver name="cg_odesolver" printLog="false" />
        <CGLinearSolver iterations="25" name="linear solver" tolerance="1.0e-9" threshold="1.0e-9" />
        <MechanicalObject template="Rigid" dx="10" dy="0" dz="0" name="default118" position="0 1.41421 0 0 0 0.382683 0.92388" rest_position="0 1.41421 0 0 0 0.382683 0.92388"/>
        <LinearMovementConstraint template="Rigid" keyTimes="0 2 10 40 50" movements="0 0 0   0 0 0
										      0 0 0   0 0 0
										      0 0 -1  0 0 0
										      0 0 -1  0 0 6.3
										      0 0 0   0 0 6.3" />
        <Node name="coli">
            <MeshObjLoader name="loader" filename="mesh/liver.obj" />
            <MeshTopology src="@loader" />
            <MechanicalObject src="@loader" template="Vec3d" name="dofs" />
            <TriangleCollisionModel moving="1" simulated="1" contactStiffness="100000000" />
            <RigidMapping template="Rigid3d,Vec3d" />
        </Node>
        <Node name="Visu">
            <MeshObjLoader name="meshLoader_0" filename="mesh/liver.obj" handleSeams="1" />
            <OglModel name="Visual" src="@meshLoader_0" color="green" />
            <RigidMapping template="Rigid3d,ExtVec3f" name="default161" input="@.." output="@Visual"/>
        </Node>
    </Node>
    <Node name="Spoon3">
        <EulerImplicitSolver name="cg_odesolver" printLog="false" />
        <CGLinearSolver iterations="25" name="linear solver" tolerance="1.0e-9" threshold="1.0e-9" />
        <MechanicalObject template="Rigid" dx="20" dy="0" dz="0" name="default118" position="0 1.41421 0 0 0 0.382683 0.92388" rest_position="0 1.41421 0 0 0 0.382683 0.92388" />
        <LinearMovementConstraint template="Rigid" keyTimes="0 2 10 40 50" movements="0 0 0   0 0 0
										      0 0 0   0 0 0
										      0 0 -1  0 0 0
										      0 0 -1  0 0 6.3
										      0 0 -1   0 0 0" />
        <Node name="coli">
            <MeshObjLoader name="loader" filename="mesh/liver.obj" />
            <MeshTopology src="@loader" />
            <MechanicalObject src="@loader" template="Vec3d" name="dofs" />
            <TriangleCollisionModel moving="1" simulated="1" contactStiffness="100000000" />
            <RigidMapping template="Rigid3d,Vec3d" />
        </Node>
        <Node name="Visu">
            <MeshObjLoader name="meshLoader_2" filename="mesh/liver.obj" handleSeams="1" />
            <OglModel name="Visual" src="@meshLoader_2" color="blue" />
            <RigidMapping template="Rigid3d,ExtVec3f" name="default161" input="@.." output="@Visual" />
        </Node>
    </Node>
</Node>
