<Node name="root" dt="0.02">
    <RequiredPlugin name="SofaOpenglVisual"/>
    <!-- <Simulation name="Simulation" /> -->
    <DefaultPipeline verbose="0" name="CollisionPipeline" />
    <BruteForceDetection name="N2" />
    <DefaultContactManager response="default" name="collision response" />
    <DiscreteIntersection />
    <!--<DefaultCollisionGroupManager />-->
    <Node name="Liver" depend="topo dofs">
        <!--<CGImplicit iterations="25"/>-->
        <EulerImplicitSolver name="cg_odesolver" printLog="false"  rayleighStiffness="0.1" rayleighMass="0.1" />
        <CGLinearSolver iterations="25" name="linear solver" tolerance="1.0e-9" threshold="1.0e-9" />
        <MechanicalObject name="dofs" />
        <!-- Container for the tetrahedra-->
        <MeshGmshLoader name="meshLoader0" filename="mesh/liver.msh" />
        <TetrahedronSetTopologyContainer name="topo" src="@meshLoader0" />
        <!-- Algorithms: used in DiagonalMass to compute the mass -->
        <TetrahedronSetGeometryAlgorithms name="GeomAlgo" />
        <DiagonalMass massDensity="1" name="computed using mass density" />
        <TetrahedralCorotationalFEMForceField name="FEM" youngModulus="3000" poissonRatio="0.3" computeGlobalMatrix="false" method="large" />
        <FixedConstraint name="FixedConstraint" indices="3 39 64" />
        <!-- Moving dof 15 along the X around a min pos  (2,0,0) with an amplitude of (1,0,0), 5 in pulsation, and 10 in phase -->
        <OscillatorConstraint name="OscillatingConstraint" oscillators="15 2 0 0 1 0 0 5 10" />
        <Node name="Visu">
            <OglModel name="VisualModel" fileMesh="mesh/liver-smooth.obj" color="red" />
            <BarycentricMapping input="@.." output="@VisualModel" name="visual mapping" />
        </Node>
        <Node name="Surf">
	    <SphereLoader filename="mesh/liver.sph" />
            <MechanicalObject position="@[-1].position" />
            <SphereCollisionModel name="CollisionModel" listRadius="@[-2].listRadius" />
            <BarycentricMapping name="sphere mapping" />
        </Node>
    </Node>
</Node>
