<Node name="root" gravity="0 -9.81 0" dt="0.01" time="0" animate="0">
    <RequiredPlugin name="SofaOpenglVisual"/>
    <VisualStyle displayFlags="showVisual showForceFields showCollisionModels showMechanicalMappings showWireframe" />
    <BruteForceDetection name="default0" />
    <DefaultContactManager name="default1" />
    <DefaultPipeline name="default2" />
    <MinProximityIntersection name="default3" alarmDistance="1" contactDistance="0.5"/>
    <Node name="pendulum" gravity="0 -9.81 0" dt="0.01" time="0" animate="0" multiThreadSimulation="0">
        <EulerImplicitSolver name="cg_odesolver" printLog="false"  rayleighStiffness="0.1" rayleighMass="0.1" />
        <CGLinearSolver iterations="25" name="linear solver" tolerance="1.0e-9" threshold="1.0e-9" />
        <MechanicalObject template="Rigid" name="DOFs" position="0 0 0 0 0 0 1 1 0 0 0 0 0 1 3 0 0 0 0 0 1 5 0 0 0 0 0 1 7 0 0 0 0 0 1"
						       velocity="0 0 0 0 0 0 0 0 0 0 0 0 0 0 0 0 0 0 0 0 0 0 0 0 0 0 0 0 0 0"
						       force="0 0 0 0 0 0 0 0 0 0 0 0 0 0 0 0 0 0 0 0 0 0 0 0 0 0 0 0 0 0"
						       dx="0 0 0 0 0 0 0 0 0 0 0 0 0 0 0 0 0 0 0 0 0 0 0 0 0 0 0 0 0 0"
						       free_position="0 0 0 0 0 0 1 1 0 0 0 0 0 1 3 0 0 0 0 0 1 5 0 0 0 0 0 1 7 0 0 0 0 0 1"
						       free_velocity="0 0 0 0 0 0 0 0 0 0 0 0 0 0 0 0 0 0 0 0 0 0 0 0 0 0 0 0 0 0"
						       rest_position="0 0 0 0 0 0 1 1 0 0 0 0 0 1 3 0 0 0 0 0 1 5 0 0 0 0 0 1 7 0 0 0 0 0 1" />
        <UniformMass template="Rigid" name="mass" vertexMass="1 1 [1 0 0,0 1 0,0 0 1]" />
        <FixedConstraint template="Rigid" name="fixOrigin" indices="0" />
        <Node name="segmentsNode" gravity="0 -9.81 0" dt="0.01" time="0" animate="0" multiThreadSimulation="0">
            <MechanicalObject template="Rigid" name="attaches" position="0 0 0 0.707914 0 0 0.707914 0 0 0 0.707914 0 0 0.707914 2 0 0 0.707914 0 0 0.707914 2 0 0 0.707914 0 0 0.707914 4 0 0 0.707914 0 0 0.707914 4 0 0 0.707914 0 0 0.707914 6 0 0 0.707914 0 0 0.707914 6 0 0 0.707914 0 0 0.707914 8 0 0 0.707914 0 0 0.707914"
							       velocity="0 0 0 0 0 0 0 0 0 0 0 0 0 0 0 0 0 0 0 0 0 0 0 0 0 0 0 0 0 0 0 0 0 0 0 0 0 0 0 0 0 0 0 0 0 0 0 0 0 0 0 0 0 0"
							       force="-0.204691 0.493087 -1.55393 -15.7823 -4.91695 -0.011207 0.204691 -0.493087 1.55393 15.7823 4.91695 0.011207 -0.817747 -0.565234 -0.504438 15.6267 -1.41904 0.0182122 0.817747 0.565234 0.504438 -15.6267 1.41904 -0.0182122 -0.490036 0.948643 0.849816 10.3784 20.6947 0.014016 0.490036 -0.948643 -0.849816 -10.3784 -20.6947 -0.014016 -1.16244 -0.595626 0.268606 3.22919 22.0184 -0.0357184 1.16244 0.595626 -0.268606 -3.22919 -22.0184 0.0357184 0 0 0 0 0 0"
							       dx="0 0 0 0 0 0 -2.04691e-005 4.93087e-005 -0.000155393 -7.89115e-005 -2.45853e-005 2.00717e-007 -2.01601e-005 4.95435e-005 -5.1433e-006 -7.89115e-005 -2.45853e-005 2.00717e-007 -0.000101935 -6.97992e-006 -5.55871e-005 -8.0336e-007 -3.15395e-005 -6.3655e-005 -3.64901e-006 -8.78868e-005 -1.67401e-005 -8.0336e-007 -3.15395e-005 -6.3655e-005 -5.26526e-005 6.9775e-006 6.82415e-005 5.10966e-005 7.20224e-005 -0.000102151 6.00157e-005 0.000177406 0.000244762 5.10966e-005 7.20224e-005 -0.000102151 -5.62283e-005 0.000117843 0.000271622 6.71189e-005 0.000181679 6.29123e-005 7.75285e-006 1.00596e-005 0.000514622 6.71189e-005 0.000181679 6.29123e-005"
							       free_position="0 0 0 0.707914 0 0 0.707914 0 0 0 0.707914 0 0 0.707914 2 0 0 0.707914 0 0 0.707914 2 0 0 0.707914 0 0 0.707914 4 0 0 0.707914 0 0 0.707914 4 0 0 0.707914 0 0 0.707914 6 0 0 0.707914 0 0 0.707914 6 0 0 0.707914 0 0 0.707914 8 0 0 0.707914 0 0 0.707914"
							       free_velocity="0 0 0 0 0 0 0 0 0 0 0 0 0 0 0 0 0 0 0 0 0 0 0 0 0 0 0 0 0 0 0 0 0 0 0 0 0 0 0 0 0 0 0 0 0 0 0 0 0 0 0 0 0 0"
						               rest_position="0 0 0 0.707914 0 0 0.707914 -1 0 0 0.707914 0 0 0.707914 1 0 0 0.707914 0 0 0.707914 -1 0 0 0.707914 0 0 0.707914 1 0 0 0.707914 0 0 0.707914 -1 0 0 0.707914 0 0 0.707914 1 0 0 0.707914 0 0 0.707914 -1 0 0 0.707914 0 0 0.707914 1 0 0 0.707914 0 0 0.707914" />
            <RigidRigidMapping template="Rigid3d,Rigid3d" name="default55" initialPoints="0 0 0 0.707914 0 0 0.707914 -1 0 0 0.707914 0 0 0.707914 1 0 0 0.707914 0 0 0.707914 -1 0 0 0.707914 0 0 0.707914 1 0 0 0.707914 0 0 0.707914 -1 0 0 0.707914 0 0 0.707914 1 0 0 0.707914 0 0 0.707914 -1 0 0 0.707914 0 0 0.707914 1 0 0 0.707914 0 0 0.707914" repartition="1 2 2 2 2" />
            <JointSpringForceField template="Rigid" name="joint springs" spring="BEGIN_SPRING  0 1  FREE_AXIS 0 0 0 0 1 0  KS_R 0 200000  KD 1  R_LIM_X 0 0  R_LIM_Y -1.57 1.57  R_LIM_Z 0 0  END_SPRING&#x0A; BEGIN_SPRING  2 3  FREE_AXIS 0 0 0 0 1 0  KS_R 0 200000  KD 1  R_LIM_X 0 0  R_LIM_Y -1.57 1.57  R_LIM_Z 0 0  END_SPRING&#x0A; BEGIN_SPRING  4 5  FREE_AXIS 0 0 0 0 1 0  KS_R 0 200000  KD 1  R_LIM_X 0 0  R_LIM_Y -1.57 1.57  R_LIM_Z 0 0  END_SPRING&#x0A; BEGIN_SPRING  6 7  FREE_AXIS 0 0 0 0 1 0  KS_R 0 200000  KD 1  R_LIM_X 0 0  R_LIM_Y -1.57 1.57  R_LIM_Z 0 0  END_SPRING&#x0A;" />
        </Node>
        <Node name="default65" gravity="0 -9.81 0" dt="0.01" time="0" animate="0" multiThreadSimulation="0">
            <OglModel name="Visual" position="0 -0.5 -0.5 0 0.5 -0.5 0 0.5 0.5 0 -0.5 0.5 2 -0.5 -0.5 2 0.5 -0.5 2 0.5 0.5 2 -0.5 0.5 2 -0.5 -0.5 2 0.5 -0.5 2 0.5 0.5 2 -0.5 0.5 4 -0.5 -0.5 4 0.5 -0.5 4 0.5 0.5 4 -0.5 0.5 4 -0.5 -0.5 4 0.5 -0.5 4 0.5 0.5 4 -0.5 0.5 6 -0.5 -0.5 6 0.5 -0.5 6 0.5 0.5 6 -0.5 0.5 6 -0.5 -0.5 6 0.5 -0.5 6 0.5 0.5 6 -0.5 0.5 8 -0.5 -0.5 8 0.5 -0.5 8 0.5 0.5 8 -0.5 0.5"
				    normals="-0.57735 -0.57735 -0.57735 -0.666667 0.333333 -0.666667 -0.408248 0.816497 0.408248 -0.57735 -0.57735 0.57735 0.333333 -0.666667 -0.666667 0.666667 0.666667 -0.333333 0.408248 0.408248 0.816497 0.816497 -0.408248 0.408248 -0.57735 -0.57735 -0.57735 -0.666667 0.333333 -0.666667 -0.408248 0.816497 0.408248 -0.57735 -0.57735 0.57735 0.333333 -0.666667 -0.666667 0.666667 0.666667 -0.333333 0.408248 0.408248 0.816497 0.816497 -0.408248 0.408248 -0.57735 -0.57735 -0.57735 -0.666667 0.333333 -0.666667 -0.408248 0.816497 0.408248 -0.57735 -0.57735 0.57735 0.333333 -0.666667 -0.666667 0.666667 0.666667 -0.333333 0.408248 0.408248 0.816497 0.816497 -0.408248 0.408248 -0.57735 -0.57735 -0.57735 -0.666667 0.333333 -0.666667 -0.408248 0.816497 0.408248 -0.57735 -0.57735 0.57735 0.333333 -0.666667 -0.666667 0.666667 0.666667 -0.333333 0.408248 0.408248 0.816497 0.816497 -0.408248 0.408248"
				    triangles="3 1 0  3 2 1  3 6 2  3 7 6  7 5 6  7 4 5  4 1 5  4 0 1  5 1 2  2 6 5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" />
            <SkinningMapping template="Rigid3d,ExtVec3f" name="map" input="@.." output="@Visual" />
        </Node>
        <Node name="CenterOfMass" gravity="0 -9.81 0" dt="0.01" time="0" animate="0" multiThreadSimulation="0">
            <MechanicalObject template="Vec3d" name="default88" listening="0" printLog="0" restScale="1" position="3.2 0 0" velocity="0 0 0" force="0 0 0" dx="-1.87325e-005 3.16272e-005 8.66385e-005" free_position="3.2 0 0" free_velocity="0 0 0" rest_position="0 0 0"/>
            <SphereCollisionModel name="default88Sphere" active="1" moving="1" simulated="1" selfCollision="0" proximity="0" contactStiffness="10" contactFriction="0.01" color="1 0.5 0 1" radius="0.2"/>
            <CenterOfMassMapping template="Rigid3d,Vec3d" name="default105" />
        </Node>
    </Node>
</Node>
