<Node name="root" dt="0.02">
    <VisualStyle displayFlags="showBehaviorModels showForceFields" />
    <CollisionPipeline verbose="0" />
    <BruteForceDetection name="N2" />
    <CollisionResponse name="Response" response="default" />
    <CollisionGroup name="Group" />
    <Node name="DragonCoarse">
        <SparseGrid n="2 2 2" fileTopology="mesh/dragon.obj" />
        <EulerImplicit />
        <CGLinearSolver iterations="100" />
        <MechanicalObject />
        <MatrixMass defaultValue="3" />
        <!-- <MatrixMass lumped="1" massMatrices="[10 0 5,0 10 3,0 0 10] [10 3 0,0 10 2,0 0 10] [10 0 5,0 10 5,0 0 10] [10 0 0,0 10 0,0 0 10] [10 0 0,0 10 0,0 0 10] [10 0 0,0 10 0,0 0 10] [10 0 0,0 10 0,0 0 10] [10 0 0,0 10 0,0 0 10] " /> -->
        <MeshSpringForceField name="Springs" stiffness="500" damping="10" />
        <Node name="Visu">
            <OglModel name="Visual" fileMesh="mesh/dragon.obj" color="yellow" />
            <BarycentricMapping object1="../.." object2="Visual" />
        </Node>
        <Node name="Surf">
	    <SphereLoader filename="mesh/dragon.sph" />
            <MechanicalObject position="@[-1].position" />
            <Sphere listRadius="@[-2].listRadius" />
            <BarycentricMapping />
        </Node>
    </Node>
</Node>
