<?xml version="1.0"?>
<Node name="root" dt="0.01">
    <RequiredPlugin name="SofaOpenglVisual"/>

	<OglModel name="VisualModel" fileMesh="data/mesh/add_repo_cube.obj" />

	<AddDataRepository path="./data/mesh" />
    <OglModel name="VisualModel" fileMesh="add_repo_cube.obj" translation="5 0 0"/>

</Node>
