<Node name="root"  dt="0.02" showBehaviorModels="1" showCollisionModels="0" showMappings="0" showForceFields="1">
	<CollisionPipeline verbose="0" />
	<BruteForceDetection name="N2" />
	<CollisionResponse name="Response" response="default" />
	<CollisionGroup name="Group" />


	<Node name="DragonCoarse">
		<SparseGrid
			n="6 5 4"
			fileTopology="mesh/dragon.obj"
			/>
		<EulerImplicit />
		<CGLinearSolver iterations="100" />
		<MechanicalObject />
		<UniformMass mass="0.5"/>
		<MeshSpringForceField name="Springs" stiffness="500" damping="10" />
		<Node name="Visu">
			<OglModel name="Visual" fileMesh="mesh/dragon.obj" color="yellow" />
			<BarycentricMapping object1="../.." object2="Visual" />
		</Node>
		<Node name="Surf">
			<Sphere filename="mesh/dragon.sph" />
			<MechanicalObject/>
			<BarycentricMapping  />
		</Node>
	</Node>


	<Node name="DragonMiddle">
		<SparseGrid
			n="12 9 6"
			fileTopology="mesh/dragon.obj"
		/>
		<EulerImplicit />
		<CGLinearSolver iterations="100" />
		<MechanicalObject dz="15"/>
		<UniformMass mass="0.5"/>
		<MeshSpringForceField name="Springs" stiffness="500" damping="10" />
		<Node name="Visu">
			<OglModel name="Visual" fileMesh="mesh/dragon.obj" color="yellow" />
			<BarycentricMapping object1="../.." object2="Visual" />
		</Node>
		<Node name="Surf">
			<Sphere filename="mesh/dragon.sph"/>
			<MechanicalObject/>
			<BarycentricMapping  />
		</Node>
	</Node>


	<Node name="DragonFine">
		<SparseGrid
			n="25 20 9"
			fileTopology="mesh/dragon.obj"
			/>
		<EulerImplicit />
		<CGLinearSolver iterations="100" />
		<MechanicalObject dz="30"/>
		<UniformMass mass="0.5"/>
		<MeshSpringForceField name="Springs" stiffness="500" damping="10" />
		<Node name="Visu">
			<OglModel name="Visual" fileMesh="mesh/dragon.obj" color="yellow" />
			<BarycentricMapping object1="../.." object2="Visual" />
		</Node>
		<Node name="Surf">
			<Sphere filename="mesh/dragon.sph" />
			<MechanicalObject/>
			<BarycentricMapping  />
		</Node>
	</Node>


</Node>
