<Node 	name="root" gravity="0 -9.81 0" dt="0.02"   >
  <VisualStyle displayFlags="showBehavior" />
	<Node 	name="Liver" gravity="0 -9.81 0" depend="topo dofs"  >
    <MeshGmshLoader name="meshLoader"  filename="mesh/liver.msh" />
		<TetrahedronSetTopologyContainer name="topo" src="@meshLoader" />
		<MechanicalObject  name="dofs"   src="@meshLoader" />
		<TetrahedronSetGeometryAlgorithms  name="GeomAlgo" />
		<DiagonalMass name="computed using mass density"  massDensity="1" />
		<TetrahedralCorotationalFEMForceField template="Vec3d" name="FEM"  method="large"  poissonRatio="0.3"  youngModulus="3000"  computeGlobalMatrix="0" />
		<FixedConstraint  name="FixedConstraint"  indices="3 39 64" />
		<Node 	name="Visu" tags="Visual" gravity="0 -9.81 0"  showVisualModels="0" >
      <VisualStyle displayFlags="showVisual showWireframe" />
			<OglModel  name="VisualModel"  fileMesh="mesh/liver-smooth.obj" />
			<BarycentricMapping name="visual mapping"  input="@../dofs"  output="@VisualModel" />
		</Node>
		<Node 	name="Surf" gravity="0 -9.81 0"  >
      <VisualStyle displayFlags="hideBehavior showCollision showWireframe"/>
			<MechanicalObject  name="spheres"  />
			<TSphereModel name="CollisionModel"  fileSphere="mesh/liver.sph" />
			<BarycentricMapping  name="sphere mapping" input="@../dofs" output="@spheres"/>
		</Node>
	</Node>
</Node>
