<!-- Collision Response Test -->
<Node name="root" dt="0.01">
    <VisualStyle displayFlags="showForceFields" />
    <CollisionPipeline verbose="0" />
    <BruteForceDetection name="N2" />
    <CollisionResponse name="Response" response="default" />
    <Node name="Poutre1">
        <EulerImplicit />
        <CGLinearSolver iterations="10" threshold="1e-5" tolerance="1e-5"/>
        <Node name="M1">
            <MechanicalObject filename="BehaviorModels/smCube27.xs3" dz="-21.0" />
            <DiagonalMass filename="BehaviorModels/smCube27.xs3" />
            <StiffSpringForceField name="Springs" filename="BehaviorModels/smCube27.xs3" />
            <FixedConstraint indices="0 3 6 9 12 15 18 21 24" />
            <Node name="Visu">
                <OglModel name="Visual" filename="mesh/smCube27.obj" color="yellow" />
                <IdentityMapping input="@.." output="@Visual" />
            </Node>
            <MeshLoader filename="mesh/smCube27.mesh" name="loader" />
            <Mesh src="@loader" />
            <Node name="Surf">
                <MechanicalObject dz="-21.0" />
                <Sphere filename="mesh/smCube27b.sph" />
                <BarycentricMapping />
            </Node>
        </Node>
        <Node name="M2">
            <MechanicalObject template="Rigid" dz="-10.5" />
            <UniformMass filename="BehaviorModels/rigid.xs3" />
            <Node name="Points">
                <MechanicalObject template="Vec3d" filename="BehaviorModels/smCube27.xs3" />
                <RigidMapping />
            </Node>
            <Node name="Surf">
                <MechanicalObject />
                <Sphere filename="mesh/smCube27b.sph" />
                <RigidMapping />
            </Node>
            <Node name="Visu">
                <OglModel name="Visual" filename="mesh/smCube27.obj" />
                <RigidMapping input="@.." output="@Visual" />
            </Node>
        </Node>
        <Node name="M3">
            <MechanicalObject filename="BehaviorModels/smCube27.xs3" />
            <DiagonalMass filename="BehaviorModels/smCube27.xs3" />
            <StiffSpringForceField name="Springs" filename="BehaviorModels/smCube27.xs3" />
            <Node name="Visu">
                <OglModel name="Visual" filename="mesh/smCube27.obj" color="red" />
                <IdentityMapping input="@.." output="@Visual" />
            </Node>
            <MeshLoader filename="mesh/smCube27.mesh" name="loader" />
            <Mesh src="@loader" />
            <Node name="Surf">
                <MechanicalObject />
                <Sphere filename="mesh/smCube27b.sph" />
                <BarycentricMapping />
            </Node>
        </Node>
        <Node name="M4">
            <MechanicalObject template="Rigid" dz="10.5" />
            <UniformMass filename="BehaviorModels/rigid.xs3" />
            <Node name="Points">
                <MechanicalObject template="Vec3d" filename="BehaviorModels/smCube27.xs3" />
                <RigidMapping />
                <Node name="Visu">
                    <OglModel name="Visual" filename="mesh/smCube27.obj" />
                    <IdentityMapping input="@.." output="@Visual" />
                </Node>
            </Node>
            <Node name="Surf">
                <MechanicalObject />
                <Sphere filename="mesh/smCube27b.sph" />
                <RigidMapping />
            </Node>
        </Node>
        <Node name="M5">
            <MechanicalObject filename="BehaviorModels/smCube27.xs3" dz="21" />
            <DiagonalMass filename="BehaviorModels/smCube27.xs3" />
            <StiffSpringForceField name="Springs" filename="BehaviorModels/smCube27.xs3" />
            <Node name="Visu">
                <OglModel name="Visual" filename="mesh/smCube27.obj" color="cyan" />
                <IdentityMapping input="@.." output="@Visual" />
            </Node>
            <MeshLoader filename="mesh/smCube27.mesh" name="loader" />
            <Mesh src="@loader" />
            <Node name="Surf">
                <MechanicalObject dz="21" />
                <Sphere filename="mesh/smCube27b.sph" />
                <BarycentricMapping />
            </Node>
        </Node>
        <Node name="M6">
            <MechanicalObject template="Rigid" dz="31.5" />
            <UniformMass filename="BehaviorModels/rigid.xs3" />
            <Node name="Points">
                <MechanicalObject template="Vec3d" filename="BehaviorModels/smCube27.xs3" />
                <RigidMapping />
            </Node>
            <Node name="Visu">
                <OglModel name="Visual" filename="mesh/dragon.obj" color="gray" />
                <RigidMapping input="@.." output="@Visual" />
            </Node>
            <Node name="Surf">
                <MechanicalObject />
                <Sphere filename="mesh/dragon.sph" />
                <RigidMapping />
            </Node>
        </Node>
        <StiffSpringForceField name="ExternalSprings1" filename="BehaviorModels/linkSmCube27.xs3" object1="@M1" object2="@Points" />
        <StiffSpringForceField name="ExternalSprings2" filename="BehaviorModels/linkSmCube27.xs3" object1="@Points" object2="@M3" />
        <StiffSpringForceField name="ExternalSprings3" filename="BehaviorModels/linkSmCube27.xs3" object1="@M3" object2="@Points" />
        <StiffSpringForceField name="ExternalSprings4" filename="BehaviorModels/linkSmCube27.xs3" object1="@Points" object2="@M5" />
        <StiffSpringForceField name="ExternalSprings5" filename="BehaviorModels/linkSmCube27.xs3" object1="@M5" object2="@Points" />
    </Node>
    <MechanicalObject dy="-20" />
    <Sphere name="Floor" filename="mesh/floor.sph" simulated="0" moving="0" />
    <OglModel name="FloorV" filename="mesh/floor.obj" texturename="textures/floor.bmp" dy="-20" />
</Node>
