<!-- Collision Response Stress Test -->
<Node name="root" dt="0.005">
    <VisualStyle displayFlags="showForceFields" />
    <CollisionPipeline verbose="0" />
    <BruteForceDetection name="N2" />
    <CollisionResponse name="Response" response="default" />
    <Node name="M1">
        <EulerImplicit />
        <CGLinearSolver iterations="100" />
        <MechanicalObject filename="BehaviorModels/smCube27.xs3" dx="0" dy="-10.5" dz="0" />
        <DiagonalMass filename="BehaviorModels/smCube27.xs3" />
        <StiffSpringForceField name="Springs" filename="BehaviorModels/smCube27.xs3" />
        <Node name="Visu">
            <OglModel name="Visual" filename="mesh/smCube27.obj" color="yellow" />
            <IdentityMapping object1="../.." object2="Visual" />
        </Node>
        <MeshLoader filename="mesh/smCube27.mesh" name="loader" />
        <Mesh src="@loader" />
        <Node name="Surf">
            <SphereLoader filename="mesh/smCube27b.sph" />
            <MechanicalObject position="@[-1].position" dx="0" dy="-10.5" dz="0" />
            <Sphere listRadius="@[-2].listRadius" />
            <BarycentricMapping />
        </Node>
    </Node>
    <Node name="M2">
        <EulerImplicit />
        <CGLinearSolver iterations="100" />
        <MechanicalObject template="Rigid" dx="4" dy="0" dz="0" />
        <UniformMass filename="BehaviorModels/rigid.xs3" />
        <Node name="Points">
            <MechanicalObject template="Vec3d" filename="BehaviorModels/smCube27.xs3" />
            <RigidMapping />
        </Node>
        <Node name="Surf">
            <SphereLoader filename="mesh/smCube27b.sph" />
            <MechanicalObject position="@[-1].position" />
            <Sphere listRadius="@[-2].listRadius" />
            <RigidMapping />
        </Node>
        <Node name="Visu">
            <OglModel name="Visual" filename="mesh/smCube27.obj" />
            <RigidMapping object1="../.." object2="Visual" />
        </Node>
    </Node>
    <Node name="M3">
        <EulerImplicit />
        <CGLinearSolver iterations="100" />
        <MechanicalObject filename="BehaviorModels/smCube27.xs3" dx="0" dy="10.5" dz="-4" />
        <DiagonalMass filename="BehaviorModels/smCube27.xs3" />
        <StiffSpringForceField name="Springs" filename="BehaviorModels/smCube27.xs3" />
        <Node name="Visu">
            <OglModel name="Visual" filename="mesh/smCube27.obj" color="red" />
            <IdentityMapping object1="../.." object2="Visual" />
        </Node>
        <MeshLoader filename="mesh/smCube27.mesh" name="loader" />
        <Mesh src="@loader" />
        <Node name="Surf">
            <SphereLoader filename="mesh/smCube27b.sph" />
            <MechanicalObject position="@[-1].position" dx="0" dy="10.5" dz="-4" />
            <Sphere listRadius="@[-2].listRadius" />
            <BarycentricMapping />
        </Node>
    </Node>
    <Node name="M4">
        <EulerImplicit />
        <CGLinearSolver iterations="100" />
        <MechanicalObject template="Rigid" dx="0" dy="21" dz="0" />
        <UniformMass filename="BehaviorModels/rigid.xs3" />
        <Node name="Points">
            <MechanicalObject template="Vec3d" filename="BehaviorModels/smCube27.xs3" />
            <RigidMapping />
            <Node name="Visu">
                <OglModel name="Visual" filename="mesh/smCube27.obj" />
                <IdentityMapping object1="../.." object2="Visual" />
            </Node>
        </Node>
        <Node name="Surf">
            <SphereLoader filename="mesh/smCube27.sph" />
            <MechanicalObject position="@[-1].position" />
            <Sphere listRadius="@[-2].listRadius" />
            <RigidMapping />
        </Node>
    </Node>
    <Node name="M5">
        <EulerImplicit />
        <CGLinearSolver iterations="100" />
        <MechanicalObject filename="BehaviorModels/smCube27.xs3" dx="-4" dy="31.5" dz="-4" />
        <DiagonalMass filename="BehaviorModels/smCube27.xs3" />
        <StiffSpringForceField name="Springs" filename="BehaviorModels/smCube27.xs3" />
        <Node name="Visu">
            <OglModel name="Visual" filename="mesh/smCube27.obj" color="cyan" />
            <IdentityMapping object1="../.." object2="Visual" />
        </Node>
        <MeshLoader filename="mesh/smCube27.mesh" name="loader" />
        <Mesh src="@loader" />
        <Node name="Surf">
            <SphereLoader filename="mesh/smCube27b.sph" />
            <MechanicalObject position="@[-1].position" dx="-4" dy="31.5" dz="-4" />
            <Sphere listRadius="@[-2].listRadius" />
            <BarycentricMapping />
        </Node>
    </Node>
    <Node name="M6">
        <EulerImplicit />
        <CGLinearSolver iterations="100" />
        <MechanicalObject template="Rigid" dx="0" dy="45" dz="0" />
        <UniformMass filename="BehaviorModels/rigid.xs3" />
        <Node name="Points">
            <MechanicalObject template="Vec3d" filename="BehaviorModels/smCube27.xs3" />
            <RigidMapping />
        </Node>
        <Node name="Visu">
            <OglModel name="Visual" filename="mesh/dragon.obj" color="gray" />
            <RigidMapping object1="../.." object2="Visual" />
        </Node>
        <Node name="Surf">
            <SphereLoader filename="mesh/dragon.sph" />
            <MechanicalObject position="@[-1].position" />
            <Sphere listRadius="@[-2].listRadius" />
            <RigidMapping />
        </Node>
    </Node>
    <SphereModel filename="mesh/floor.sph" />
    <MechanicalObject position="@[-1].position" dy="-20" />
    <Sphere listRadius="@[-2].listRadius" simulated="0" moving="0" />
    <Node>
        <OglModel name="FloorV" filename="mesh/floor.obj" texturename="textures/floor.bmp" dy="-20" />
    </Node>
</Node>
