<Node name="root" dt="0.01">
    <RequiredPlugin name="SofaOpenglVisual"/>
    <BackgroundSetting color="0.901960784 0.925490196 0.964705882" />
    <Gravity name="G" gravity="0.0 -9.81 0" />
    <Node name="Head">
        <OglModel name="HeadVisualModel" fileMesh="data/mesh/head.obj" texturename="Tutorials/StepByStep/Dentistry_Haptics/data/pics/head_baseTexBaked.png" />
        <Node name="Tongue">
            <OglModel name="TongueVisualModel" fileMesh="data/mesh/tongue.obj" texturename="Tutorials/StepByStep/Dentistry_Haptics/data/pics/tongue_color.png" />
        </Node>
        <Node name="Teeth">
            <OglModel name="TeethVisualModel" fileMesh="data/mesh/teeth.obj" texturename="Tutorials/StepByStep/Dentistry_Haptics/data/pics/teeth_color.png" />
        </Node>
    </Node>
    <Node name="Instrument">
        <EulerImplicitSolver name="ODE solver" rayleighStiffness="0.01" rayleighMass="1.0" />
        <CGLinearSolver name="linear solver" iterations="25" tolerance="1e-10" threshold="10e-10" />
        <MechanicalObject name="instrumentState" template="Rigid" />
        <UniformMass name="mass" totalMass="0.05" filename="BehaviorModels/dental_instrument.rigid" />
        <Node name="VisualModel">
            <OglModel name="InstrumentVisualModel" fileMesh="data/mesh/dental_instrument.obj" color="0.8 0.8 0.8 1.0" dz="-10" />
            <RigidMapping name="MM-&gt;VM mapping" input="@instrumentState" output="@InstrumentVisualModel" />
        </Node>
    </Node>
</Node>
